Mon Mar  7 14:12:42 CET 2016
$PROBLEM    ggxpose test run
$INPUT      ID OCC DOSE AMT SS II TAD TIME DV CLCR AGE SEX CLASS WT
            ACE MED1 MED2 EVID
$DATA      ggxpose_test_dataset.csv IGNORE=@
$SUBROUTINE ADVAN2 TRANS1
$PK
   TVCL  = THETA(1) * (1 + THETA(6) * (CLCR - 65))
   CL    = TVCL * EXP(ETA(1))

   TVV   = THETA(2) * WT
   V     = TVV * EXP(ETA(2))

   TVKA  = THETA(3)
   KA    = TVKA * EXP(ETA(3))

   ALAG1 = THETA(4)

   K     = CL/V
   S2    = V

$ERROR
 A1    = A(1)
 A2    = A(2)

 IPRED = LOG(0.025)
 IF(F.GT.0) IPRED = LOG(F)

 W     = THETA(5)
 IRES  = IPRED - DV
 IWRES = IRES/W

 Y     = IPRED + ERR(1) * W

$THETA  (0,26.5055) ; Th1. CL
 (0,1.42569) ; Th2. V
 (0,3.51068) ; Th3. KA
 (0,0.232223) ; Th4. LAG
 (0,0.371944) ; Th5. Add ERR
 (0,0.00651728,0.02941) ; Th6. CRCL on CL
$OMEGA  0.0419341  ;  Om1.1. CL
 0.0135816  ;   Om2.2. V
 2.55683  ;  Om3.3. KA
$SIGMA  1  FIX  ; Sig1.1. Err
$ESTIMATION METHOD=1 INTER MAXEVALS=9999 PRINT=5 NOABORT
$TABLE      ID OCC DOSE AMT SS II TIME TAD IPRED CWRES IWRES EVID
            ONEHEADER NOPRINT FILE=sdtab001
$TABLE      ID SEX CLASS ACE MED1 MED2 ONEHEADER NOPRINT FILE=catab001
$TABLE      ID CLCR AGE WT ONEHEADER NOPRINT FILE=cotab001
$TABLE      ID KA CL V ALAG1 ETAS(1:LAST) ONEHEADER NOPRINT
            FILE=patab001

NM-TRAN MESSAGES
 WARNINGS AND ERRORS (IF ANY) FOR PROBLEM    1
 (WARNING  2) NM-TRAN INFERS THAT THE DATA ARE POPULATION.

1NONLINEAR MIXED EFFECTS MODEL PROGRAM (NONMEM) VERSION 7.3.0
 ORIGINALLY DEVELOPED BY STUART BEAL, LEWIS SHEINER, AND ALISON BOECKMANN
 CURRENT DEVELOPERS ARE ROBERT BAUER, ICON DEVELOPMENT SOLUTIONS,
 AND ALISON BOECKMANN. IMPLEMENTATION, EFFICIENCY, AND STANDARDIZATION
 PERFORMED BY NOUS INFOSYSTEMS.
 PROBLEM NO.:         1
 ggxpose test run
 TOT. NO. OF OBS RECS:     1022
 TOT. NO. OF INDIVIDUALS:     74
 ONE COMPARTMENT MODEL WITH FIRST-ORDER ABSORPTION (ADVAN2)
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 #TBLN:      1
 #METH: First Order Conditional Estimation with Interaction
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
 #TERM:
0MINIMIZATION TERMINATED
 DUE TO ROUNDING ERRORS (ERROR=134)
 NO. OF FUNCTION EVALUATIONS USED:       54
 NO. OF SIG. DIGITS IN FINAL EST.:  2.9
 ADDITIONAL PROBLEMS OCCURRED WITH THE MINIMIZATION.
 REGARD THE RESULTS OF THE ESTIMATION STEP CAREFULLY, AND ACCEPT THEM ONLY
 AFTER CHECKING THAT THE COVARIANCE STEP PRODUCES REASONABLE OUTPUT.

 ETABAR IS THE ARITHMETIC MEAN OF THE ETA-ESTIMATES,
 AND THE P-VALUE IS GIVEN FOR THE NULL HYPOTHESIS THAT THE TRUE MEAN IS 0.

 ETABAR:         6.5633E-03 -1.0722E-02 -1.7043E-01
 SE:             2.1241E-02  6.9744E-03  1.5749E-01
 N:                      74          74          74

 P VAL.:         7.5733E-01  1.2422E-01  2.7918E-01

 ETAshrink(%):   1.0160E+01  4.8167E+01  1.4694E+01
 EBVshrink(%):   9.9090E+00  4.9293E+01  1.1130E+01
 EPSshrink(%):   6.7442E+00

 #TERE:
 Elapsed estimation time in seconds:     2.34

 ********************               FIRST ORDER CONDITIONAL ESTIMATION WITH INTERACTION              ********************
 #OBJT:**************                       MINIMUM VALUE OF OBJECTIVE FUNCTION                      ********************
 #OBJV:********************************************     -656.873       **************************************************

 ********************               FIRST ORDER CONDITIONAL ESTIMATION WITH INTERACTION              ********************
 ********************                             FINAL PARAMETER ESTIMATE                           ********************

 THETA - VECTOR OF FIXED EFFECTS PARAMETERS   *********
         TH 1      TH 2      TH 3      TH 4      TH 5      TH 6
         2.65E+01  1.43E+00  3.51E+00  2.32E-01  3.72E-01  6.52E-03

 OMEGA - COV MATRIX FOR RANDOM EFFECTS - ETAS  ********
            ETA1      ETA2      ETA3
 ETA1
+        4.19E-02
 ETA2
+        0.00E+00  1.36E-02
 ETA3
+        0.00E+00  0.00E+00  2.56E+00

 SIGMA - COV MATRIX FOR RANDOM EFFECTS - EPSILONS  ****
            EPS1
 EPS1
+        1.00E+00

 OMEGA - CORR MATRIX FOR RANDOM EFFECTS - ETAS  *******
            ETA1      ETA2      ETA3
 ETA1
+        2.05E-01
 ETA2
+        0.00E+00  1.17E-01
 ETA3
+        0.00E+00  0.00E+00  1.60E+00

 SIGMA - CORR MATRIX FOR RANDOM EFFECTS - EPSILONS  ***
            EPS1
 EPS1
+        1.00E+00
 #CPUT: Total CPU Time in Seconds,        2.672
