Mon Apr  6 18:16:52 CEST 2015
;; 1. Based on:          036
;; 2. Description:       Onset function
;; 3. Label:             037
;; 4. Structural model:  Para: 2CMT,1TR | Exclude Meal 7
;; 5. Covariate model:   SEXSLP, T2DMSLP
;; 6. IIV:               CL, VC, BA, KG0, D1, SLP, KDJ
;; 7. IOV:               na
;; 8. Residual Var:      Combined-LLOQ/2
;; 9. Estimation:        FOCE-I
$PROBLEM    New Gastric Emptying Model
$INPUT      EXLD PID ID2 ID STUDY T2DM MEAL TIME FLG DV AMT RATE BQL
            LLOQ CMT MDV EVID SEX AGE HT WT BMI
$DATA      POOL_8MEALS_v5_COV.csv IGNORE=@ IGNORE=(EXLD>0)
            IGNORE=(FLG==1) IGNORE=(BQL==1) IGNORE=(MEAL==7)
$ABBREVIATED DERIV2=NO
$SUBROUTINE ADVAN13 TOL=6 ; Fine
$MODEL      COMP=(DEPOT) ; 1. Paracetamol in Stomach
            COMP=(TRANS) ; 2. Paracetamol Small Intestine/Duodenum
            COMP=(CENTRAL,DEFOBS) ; 3. Paracetamol Central Compartment
            COMP=(PERIPH) ; 4. Paracetamol Peripheral Compartment
            COMP=(GLUC) ; 5. Calories in intestine
$PRIOR      NWPRI
$PK
;_________________________________ Covariates _________________________________;
WOMAN = 0
IF(SEX.EQ.2) WOMAN = 1

DIAB = 0
IF(T2DM.EQ.2) DIAB = 1

;______________________________ Meals Composition _____________________________;
GLUC = 0                 ; Amount of carbohydrates (g)
IF (MEAL==4) GLUC = 107
IF (MEAL==5) GLUC = 93
IF (MEAL==6) GLUC = 32

PROT = 0                 ; Amount of proteins (g)
IF (MEAL==4) PROT = 13
IF (MEAL==5) PROT = 11
IF (MEAL==6) PROT = 3

FAT  = 0                 ; Amount of fat (g)
IF (MEAL==4) FAT  = 2.5
IF (MEAL==5) FAT  = 10
IF (MEAL==6) FAT  = 40

;______________________ Parameters with prior information______________________;
 HLKA   = THETA(1)                                   ; Absorption half-life (Clements et al 1978)
 KA     = LOG(2)/HLKA

;________________________ Disposition related Parameters ______________________;
 TVCL   = THETA(2)
 CL     = TVCL*EXP(ETA(1))                           ; Clearance total

 TVVC   = THETA(3)
 VC     = TVVC*EXP(ETA(2))                           ; Volume of central compartment

 VP     = THETA(4)                                   ; Volume of peripheral compartment

 Q      = THETA(5)                                   ; Distribution Clearance

;________________________ Absorption related Parameters _______________________;
 F1     = 1*EXP(ETA(3))                              ; Relative Bioavailability

 IF(STUDY.EQ.3) THEN
  D1    = 1                                          ; The whole dose in 1 min
  ALAG1 = 0                                          ; No delay with Meal 0
 ENDIF

 IF(STUDY.EQ.2) THEN
  D1    = 0.0001 ;PHI(ETA(4))*10                     ; Uniform distribution approx 0-10 min
  T50   = THETA(6)                                   ; Short delay with OGTT
ENDIF

 IF(STUDY.EQ.1) THEN
  D1    = 0.0001 ;PHI(ETA(4))*10                     ; Uniform distribution approx 0-10 min
  T50   = THETA(7)                                   ; Longer delay with Fat meal
ENDIF

 TEMP   = ETA(4)

 TVKG0  = LOG(2)/THETA(8)
 KG0    = TVKG0*EXP(ETA(5))                          ; Maximal rate of Gastric Emptying

 TVSLP  = THETA(9)*(1+THETA(11)*WOMAN)*(1+THETA(12)*DIAB)

 SLP    = TVSLP*EXP(ETA(6))                          ; Linear slope of glucose inhibition on KG

 TVKDJ  = LOG(2)/THETA(10)                           ; K duodenum jejunum (min-1)
 KDJ    = TVKDJ*EXP(ETA(7))

 STEEP  = THETA(13)

;___________________________ Calories Parameters ______________________________;
 RAMAXD = 0.573*4.1                                  ; Maximum rate of absorption Kcal in intestine
 KM     = 6.28*4.1                                   ; 50 % of absorption rate (Kcal)

;_____________________________ Meal Parameters ________________________________;
 KCAL  = 0                                           ; Control calories
 IF(MEAL==1) KCAL = 25*4.1                           ; OGTT 25g calories
 IF(MEAL==2) KCAL = 75*4.1                           ; OGTT 75g calories
 IF(MEAL==3) KCAL = 125*4.1                          ; OGTT 125g calories
 IF(MEAL>=4) KCAL = GLUC*4.1 + PROT*4.1 + FAT*8.8    ; Equivalence calories

;__________________________ Paracetamol Parameters ____________________________;
 IF(NEWIND.NE.2) FLAG = 0                            ; Reset flag for each new individuals
 IF(AMT.GT.0.AND.FLAG.EQ.0) FLAG = 1                 ; Flag of the first Dose
 IF(EVID.EQ.1.OR.EVID.EQ.4) TDOS = TIME              ; Compile time after dose (TAD)
 DOZ    = 9.9231                                     ; Theoretical dose of paracetamol (mMol)
 DPARA  = F1*DOZ*FLAG                                ; 'Real' dose of paracetamol

$DES
; Compartment Amounts (Safety)
 X1 = A(1)                                           ; Amount of Paracetamol in the stomach (mMol)
 X2 = A(2)                                           ; Amount of Paracetamol in the Intestine (mMol)
 X3 = A(3)                                           ; Amount of Paracetamol in the Central Compartment (mMol)
 X4 = A(4)                                           ; Amount of Paracetamol in the Peripheral Compartment (mMol)
 X5 = A(5)                                           ; Calories in the intestine (Kcal)
 IF (X5.LE.0) X5 = 1E-10

; Gastric delay
 TAD1    = T - TDOS                                  ; Time after dose (TAD)
 LAG1    = 1                                         ; No onset water
 IF(MEAL.GT.0) THEN
  LAG1    = 1/(1+EXP(-STEEP*(TAD1-T50)))             ; Onset Time stomach (min)
 ENDIF

;______________________________ Paracetamol Model _____________________________;
 KG1     =  KG0*(1+SLP*X5)

; Eq Diff
 DADT(1) = -KG1*X1*LAG1                              ; Stomach Paracetamol (mMol)
 DADT(2) =  KG1*X1*LAG1 - KA*X2                      ; Duodenum/Small Intestine Paracetamol (mMol)
 DADT(3) =  KA*X2 - ((CL+Q)/VC)*X3 + (Q/VP)*X4       ; Central Paracetamol (mMol)
 DADT(4) =  (Q/VC)*X3 - (Q/VP)*X4                    ; Peripheral Paracetamol (mMol)

;_______________________________ Calories Model _______________________________;
; Glucose Stomach
 AGS1    = 0                                         ; Safety to avoid dividing by 0
 IF(FLAG==1) AGS1 = (X1/DPARA)*KCAL                  ; Calories in the stomach (Kcal)

; Eq Diff
 RAD     = RAMAXD*X5/(KM+X5)                         ; Rate of Absorption in intestine
 DADT(5) = KG1*AGS1*LAG1 -RAD -KDJ*X5                ; Calories in intestine (Kcal)

$ERROR
; Compartment Amounts
 A1 = A(1)                                           ; Amount of Paracetamol in the stomach (mMol)
 A2 = A(2)                                           ; Amount of Paracetamol in the Intestine (mMol)
 A3 = A(3)                                           ; Amount of Paracetamol in the Central Compartment (mMol)
 A4 = A(4)                                           ; Amount of Paracetamol in the Peripheral Compartment (mMol)
 A5 = A(5)                                           ; Calories in the intestine (Kcal)
 IF (A5.LE.0) A5 = 1E-10

; Glucose Stomach
 AGS    = 0                                          ; Safety to avoid dividing by 0
 IF(FLAG==1) AGS = (A1/DPARA)*KCAL                   ; Calories in the stomach (Kcal)

; Gastric delay
 TAD    = TIME - TDOS                                ; Time after dose (TAD)
 LAG    = 1                                          ; No onset water
 IF(MEAL.GT.0) THEN
  LAG    = 1/(1+EXP(-STEEP*(TAD-T50)))               ; Onset Time stomach (min)
 ENDIF

; Paracetamol Fit
 CP    = A3/VC                                       ; Predicted Plasma concentration (mMol/L)
 IPRED = CP
 Y     = IPRED * (1+EPS(1)) + EPS(2)*(LLOQ/2)**2
 W     = SQRT((IPRED*SQRT(SIGMA(1,1)))**2 + (LLOQ/2)**2) ; Weighting
 IF (W<=0) W = 1E-5                                  ; Safety for NaN
 IRES  = DV-IPRED                                    ; Individual residual
 IWRES = IRES/W                                      ; Individual Weighted residual

$THETAP  6.779 FIX ; HLKA prior
$THETAPV  0.808  FIX  ; HLKA prior uncertainty
$THETA  (0,8.314860) ; Th1. HLKA (min-1)
 (0,0.437501) ; Th2. CL (L/min)
 (0,11.56370) ; Th3. Vc (L)
 (0,54.62910) ; Th4. Vp (L)
 (0,1.788680) ; Th5. Q  (L/min)
 (0,8.967270) ; Th6. ALAG Ogtt (min)
 (0,14.53210) ; Th7. ALAG Fat (min)
 (0,1.487240) ; Th8. KG Half-life (min)
 -0.01937 ; Th9. Slp (na)
 (0,23.88510) ; Th10. HL Kdj (min)
 0.284149 ; Th11. SEX on SLP
 -0.12693 ; Th12. T2DM on SLP
 (0,0.659120) ; Th13. Onset steepness
$OMEGA  0.029528  ;  Om1.1. CL
 0.922095  ;  Om2.2. Vc
 0.031843  ;  Om3.3. BA
 0  FIX  ; Om4.4. D1 uniform
 1.415040  ; Om5.5. KG0
 0.039306  ; Om6.6. Slp
 0.272711  ; Om7.7. KDJ
$SIGMA  0.022582  ; Sig1.1. Proportional Error
 1  FIX  ; Sig2.2. Additive Error
;$ESTIMATION METHOD=1 SIGL=3 NSIG=1 INTER MAXEVAL=9999 PRINT=1 NOABORT ; Fast
$ESTIMATION METHOD=1 SIGL=6 NSIG=2 INTER MAXEVAL=9999 PRINT=1 NOABORT ; Fine
$ESTIMATION METHOD=IMP EONLY=1 ISAMPLE=1000 NITER=5
$COVARIANCE UNCONDITIONAL MATRIX=R
$TABLE      ID STUDY T2DM MEAL TIME DV AMT CMT MDV EVID IPRED CWRES
            IWRES NOPRINT ONEHEADER FILE=sdtab037
$TABLE      ID TIME MDV A1 A2 A3 A4 A5 ETAS(1:7) CL VC KG0 KG1 KA F1
            T50 STEEP LAG D1 SLP KDJ WOMAN DIAB CP DPARA AGS KCAL
            NOAPPEND NOPRINT ONEHEADER FILE=patab037

NM-TRAN MESSAGES
 WARNINGS AND ERRORS (IF ANY) FOR PROBLEM    1
 (WARNING  2) NM-TRAN INFERS THAT THE DATA ARE POPULATION.
 (WARNING  48) DES-DEFINED ITEMS ARE COMPUTED ONLY WHEN EVENT TIME
 INCREASES. E.G., DISPLAYED VALUES ASSOCIATED WITH THE FIRST EVENT RECORD
 OF AN INDIVIDUAL RECORD ARE COMPUTED WITH (THE LAST ADVANCE TO) AN EVENT
 TIME OF THE PRIOR INDIVIDUAL RECORD.
 (WARNING  79) SIGMA IS USED ON THE RIGHT. WITH A SUBSEQUENT RUN, IF AN
 INITIAL ESTIMATE OF A DIAGONAL BLOCK OF SIGMA IS TO BE COMPUTED BY
 NONMEM, THAT BLOCK WILL BE SET TO AN IDENTITY MATRIX DURING THAT
 COMPUTATION. THIS COULD LEAD TO AN ARITHMETIC EXCEPTION.*
 * THE MAXIMUM NUMBER OF WARNINGS OF ONE OR MORE TYPES WAS REACHED.
 IT IS POSSIBLE THAT SOME WARNING MESSAGES WERE SUPPRESSED.

1NONLINEAR MIXED EFFECTS MODEL PROGRAM (NONMEM) VERSION 7.3.0
 ORIGINALLY DEVELOPED BY STUART BEAL, LEWIS SHEINER, AND ALISON BOECKMANN
 CURRENT DEVELOPERS ARE ROBERT BAUER, ICON DEVELOPMENT SOLUTIONS,
 AND ALISON BOECKMANN. IMPLEMENTATION, EFFICIENCY, AND STANDARDIZATION
 PERFORMED BY NOUS INFOSYSTEMS.
 PROBLEM NO.:         1
 New Gastric Emptying Model
 TOT. NO. OF OBS RECS:     1615
 TOT. NO. OF INDIVIDUALS:    183
 GENERAL NONLINEAR KINETICS MODEL USING LSODA (ADVAN13)
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 #TBLN:      1
 #METH: First Order Conditional Estimation with Interaction
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
 #TERM:
0MINIMIZATION TERMINATED
 DUE TO ROUNDING ERRORS (ERROR=134)
 NO. OF FUNCTION EVALUATIONS USED:      551
 NO. OF SIG. DIGITS IN FINAL EST.:  1.5
 ADDITIONAL PROBLEMS OCCURRED WITH THE MINIMIZATION.
 REGARD THE RESULTS OF THE ESTIMATION STEP CAREFULLY, AND ACCEPT THEM ONLY
 AFTER CHECKING THAT THE COVARIANCE STEP PRODUCES REASONABLE OUTPUT.

 ETABAR IS THE ARITHMETIC MEAN OF THE ETA-ESTIMATES,
 AND THE P-VALUE IS GIVEN FOR THE NULL HYPOTHESIS THAT THE TRUE MEAN IS 0.

 ETABAR:         1.1043E-02  3.7396E-02  6.6292E-03  0.0000E+00 -4.0619E-02 -6.1159E-03  6.3475E-03
 SE:             7.6183E-03  5.4211E-02  1.0711E-02  0.0000E+00  5.9989E-02  7.7041E-03  2.7719E-02
 N:                     183         183         183         183         183         183         183

 P VAL.:         1.4718E-01  4.9030E-01  5.3597E-01  1.0000E+00  4.9833E-01  4.2728E-01  8.1888E-01

 ETAshrink(%):   3.9761E+01  2.3346E+01  1.8611E+01  1.0000E+02  3.1784E+01  4.7233E+01  2.7956E+01
 EBVshrink(%):   3.9129E+01  1.9224E+01  1.9363E+01  0.0000E+00  3.0036E+01  4.6371E+01  2.6471E+01
 EPSshrink(%):   1.7258E+01  1.7258E+01

 #TERE:
 Elapsed estimation time in seconds:   954.86

 ********************               FIRST ORDER CONDITIONAL ESTIMATION WITH INTERACTION              ********************
 #OBJT:**************                       MINIMUM VALUE OF OBJECTIVE FUNCTION                      ********************
 #OBJV:********************************************   -12342.590       **************************************************

 ********************               FIRST ORDER CONDITIONAL ESTIMATION WITH INTERACTION              ********************
 ********************                             FINAL PARAMETER ESTIMATE                           ********************

 THETA - VECTOR OF FIXED EFFECTS PARAMETERS   *********
         TH 1      TH 2      TH 3      TH 4      TH 5      TH 6      TH 7      TH 8      TH 9      TH10      TH11      TH12
          TH13
         8.32E+00  4.38E-01  1.16E+01  5.47E+01  1.79E+00  8.97E+00  1.45E+01  1.49E+00 -1.95E-02  2.39E+01  2.82E-01 -1.29E-01
          6.59E-01

 OMEGA - COV MATRIX FOR RANDOM EFFECTS - ETAS  ********
            ETA1      ETA2      ETA3      ETA4      ETA5      ETA6      ETA7
 ETA1
+        2.94E-02
 ETA2
+        0.00E+00  9.20E-01
 ETA3
+        0.00E+00  0.00E+00  3.19E-02
 ETA4
+        0.00E+00  0.00E+00  0.00E+00  0.00E+00
 ETA5
+        0.00E+00  0.00E+00  0.00E+00  0.00E+00  1.42E+00
 ETA6
+        0.00E+00  0.00E+00  0.00E+00  0.00E+00  0.00E+00  3.92E-02
 ETA7
+        0.00E+00  0.00E+00  0.00E+00  0.00E+00  0.00E+00  0.00E+00  2.72E-01

 SIGMA - COV MATRIX FOR RANDOM EFFECTS - EPSILONS  ****
            EPS1      EPS2
 EPS1
+        2.26E-02
 EPS2
+        0.00E+00  1.00E+00

 OMEGA - CORR MATRIX FOR RANDOM EFFECTS - ETAS  *******
            ETA1      ETA2      ETA3      ETA4      ETA5      ETA6      ETA7
 ETA1
+        1.72E-01
 ETA2
+        0.00E+00  9.59E-01
 ETA3
+        0.00E+00  0.00E+00  1.79E-01
 ETA4
+        0.00E+00  0.00E+00  0.00E+00  0.00E+00
 ETA5
+        0.00E+00  0.00E+00  0.00E+00  0.00E+00  1.19E+00
 ETA6
+        0.00E+00  0.00E+00  0.00E+00  0.00E+00  0.00E+00  1.98E-01
 ETA7
+        0.00E+00  0.00E+00  0.00E+00  0.00E+00  0.00E+00  0.00E+00  5.22E-01

 SIGMA - CORR MATRIX FOR RANDOM EFFECTS - EPSILONS  ***
            EPS1      EPS2
 EPS1
+        1.50E-01
 EPS2
+        0.00E+00  1.00E+00
 #TBLN:      2
 #METH: Objective Function Evaluation by Importance Sampling
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
 #TERM:
 EXPECTATION ONLY PROCESS COMPLETED


 ETABAR IS THE ARITHMETIC MEAN OF THE ETA-ESTIMATES,
 AND THE P-VALUE IS GIVEN FOR THE NULL HYPOTHESIS THAT THE TRUE MEAN IS 0.

 ETABAR:        -4.3377E-03 -8.2310E-02  1.4193E-02  0.0000E+00  9.8056E-02 -3.7791E-03 -5.9556E-03
 SE:             7.4668E-03  5.6174E-02  1.0777E-02  0.0000E+00  6.4357E-02  7.6407E-03  2.8171E-02
 N:                     183         183         183           0         183         183         183

 P VAL.:         5.6129E-01  1.4285E-01  1.8784E-01  1.0000E+00  1.2761E-01  6.2088E-01  8.3257E-01

 ETAshrink(%):   4.0959E+01  2.0570E+01  1.8112E+01  0.0000E+00  2.6816E+01  4.7667E+01  2.6782E+01
 EBVshrink(%):   4.0040E+01  1.7762E+01  1.9407E+01  0.0000E+00  2.5496E+01  4.5399E+01  2.7136E+01
 EPSshrink(%):   1.5894E+01  1.5894E+01

 #TERE:
 Elapsed estimation time in seconds:    48.10

 Number of Negative Eigenvalues in Matrix=           3
 Most negative value=  -7127.6922603822404
 Most positive value=   3684679.2823106381
 Forcing positive definiteness
 Root mean square deviation of matrix from original=   3.86792534933478671E-003

 Elapsed covariance time in seconds:  2386.95

 ********************               OBJECTIVE FUNCTION EVALUATION BY IMPORTANCE SAMPLING             ********************
 #OBJT:**************                        FINAL VALUE OF OBJECTIVE FUNCTION                       ********************
 #OBJV:********************************************   -12331.314       **************************************************

 ********************               OBJECTIVE FUNCTION EVALUATION BY IMPORTANCE SAMPLING             ********************
 ********************                             FINAL PARAMETER ESTIMATE                           ********************

 THETA - VECTOR OF FIXED EFFECTS PARAMETERS   *********
         TH 1      TH 2      TH 3      TH 4      TH 5      TH 6      TH 7      TH 8      TH 9      TH10      TH11      TH12
          TH13
         8.32E+00  4.38E-01  1.16E+01  5.47E+01  1.79E+00  8.97E+00  1.45E+01  1.49E+00 -1.95E-02  2.39E+01  2.82E-01 -1.29E-01
          6.59E-01

 OMEGA - COV MATRIX FOR RANDOM EFFECTS - ETAS  ********
            ETA1      ETA2      ETA3      ETA4      ETA5      ETA6      ETA7
 ETA1
+        2.94E-02
 ETA2
+        0.00E+00  9.20E-01
 ETA3
+        0.00E+00  0.00E+00  3.19E-02
 ETA4
+        0.00E+00  0.00E+00  0.00E+00  0.00E+00
 ETA5
+        0.00E+00  0.00E+00  0.00E+00  0.00E+00  1.42E+00
 ETA6
+        0.00E+00  0.00E+00  0.00E+00  0.00E+00  0.00E+00  3.92E-02
 ETA7
+        0.00E+00  0.00E+00  0.00E+00  0.00E+00  0.00E+00  0.00E+00  2.72E-01

 SIGMA - COV MATRIX FOR RANDOM EFFECTS - EPSILONS  ****
            EPS1      EPS2
 EPS1
+        2.26E-02
 EPS2
+        0.00E+00  1.00E+00

 OMEGA - CORR MATRIX FOR RANDOM EFFECTS - ETAS  *******
            ETA1      ETA2      ETA3      ETA4      ETA5      ETA6      ETA7
 ETA1
+        1.72E-01
 ETA2
+        0.00E+00  9.59E-01
 ETA3
+        0.00E+00  0.00E+00  1.79E-01
 ETA4
+        0.00E+00  0.00E+00  0.00E+00  0.00E+00
 ETA5
+        0.00E+00  0.00E+00  0.00E+00  0.00E+00  1.19E+00
 ETA6
+        0.00E+00  0.00E+00  0.00E+00  0.00E+00  0.00E+00  1.98E-01
 ETA7
+        0.00E+00  0.00E+00  0.00E+00  0.00E+00  0.00E+00  0.00E+00  5.22E-01

 SIGMA - CORR MATRIX FOR RANDOM EFFECTS - EPSILONS  ***
            EPS1      EPS2
 EPS1
+        1.50E-01
 EPS2
+        0.00E+00  1.00E+00

 ********************               OBJECTIVE FUNCTION EVALUATION BY IMPORTANCE SAMPLING             ********************
 ********************                          STANDARD ERROR OF ESTIMATE (R)                        ********************

 THETA - VECTOR OF FIXED EFFECTS PARAMETERS   *********
         TH 1      TH 2      TH 3      TH 4      TH 5      TH 6      TH 7      TH 8      TH 9      TH10      TH11      TH12
          TH13
         7.50E-01  1.99E-02  1.09E+00  2.08E+00  1.04E-01  2.83E-01  2.28E-01  4.68E-01  2.13E-03  2.13E+00  7.34E-02  4.89E-02
          8.44E-02

 OMEGA - COV MATRIX FOR RANDOM EFFECTS - ETAS  ********
            ETA1      ETA2      ETA3      ETA4      ETA5      ETA6      ETA7
 ETA1
+        9.88E-03
 ETA2
+        0.00E+00  2.21E-01
 ETA3
+        0.00E+00  0.00E+00  5.34E-03
 ETA4
+        0.00E+00  0.00E+00  0.00E+00  0.00E+00
 ETA5
+        0.00E+00  0.00E+00  0.00E+00  0.00E+00  3.15E-01
 ETA6
+        0.00E+00  0.00E+00  0.00E+00  0.00E+00  0.00E+00  1.65E-02
 ETA7
+        0.00E+00  0.00E+00  0.00E+00  0.00E+00  0.00E+00  0.00E+00  7.38E-02

 SIGMA - COV MATRIX FOR RANDOM EFFECTS - EPSILONS  ****
            EPS1      EPS2
 EPS1
+        3.04E-03
 EPS2
+        0.00E+00  0.00E+00

 OMEGA - CORR MATRIX FOR RANDOM EFFECTS - ETAS  *******
            ETA1      ETA2      ETA3      ETA4      ETA5      ETA6      ETA7
 ETA1
+        2.88E-02
 ETA2
+       .........  1.15E-01
 ETA3
+       ......... .........  1.50E-02
 ETA4
+       ......... ......... ......... .........
 ETA5
+       ......... ......... ......... .........  1.32E-01
 ETA6
+       ......... ......... ......... ......... .........  4.17E-02
 ETA7
+       ......... ......... ......... ......... ......... .........  7.07E-02

 SIGMA - CORR MATRIX FOR RANDOM EFFECTS - EPSILONS  ***
            EPS1      EPS2
 EPS1
+        1.01E-02
 EPS2
+       ......... .........
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 #CPUT: Total CPU Time in Seconds,    69237.434
