Fri Sep  1 01:27:25 CEST 2017
;; 1. Based on:     000
;; 2. Description:
;;    NONMEM PK example for xpose
$PROBLEM    Parameter estimation
$INPUT      ID OCC XAT2=DROP DGRP=DROP DOSE FLAG=DROP ONO=DROP
            XIME=DROP DV NEUY=DROP SCR AGE SEX CLASS WT DROP ACE MED1
            MED2 NUMB=DROP TAD TIME VIDD=DROP CLCR AMT SS II DROP
            CMT=DROP CONO=DROP LNDV=DROP EVID=DROP OVID=DROP DROP
            SHR2=DROP
$DATA      mx19_1.csv IGNORE=@
$ABBREVIATED DERIV2=NO COMRES=6
$SUBROUTINE ADVAN2 TRANS1
$PK

   TVCL    = THETA(1)*(1+THETA(6)*(CLCR-65))
   TVV     = THETA(2)*WT
   CL      = TVCL*EXP(ETA(1))
   V       = TVV*EXP(ETA(2))
   KA      = THETA(3)*EXP(ETA(3))
   ALAG1   = THETA(4)
   K       = CL/V
   S2      = V

$ERROR

     A1    = A(1)
     A2    = A(2)
     W     = THETA(5)
     IPRED = F
     IRES  = IPRED-DV
     IWRES = IRES/W
     Y     = IPRED+ERR(1)*W

$THETA  (0,27.5) ; TVCL
$THETA  (0,1.565) ; TVV
$THETA  (0,2.1) ; TVKA
$THETA  (0,.254) ; LAG
$THETA  (0,.23) ; RES ERR
$THETA  (0,.008,.02941) ; CRCL on CL
$OMEGA  0.3  ;     IIV CL
$OMEGA  0.3  ;      IIV V
$OMEGA  0.3  ;     IIV KA
$SIGMA  1  FIX
$ESTIMATION METHOD=1 INTER MAXEVALS=9999 PRINT=1 NOABORT MSFO=msf001
$COVARIANCE PRINT=E
$TABLE      ID OCC DOSE AMT SS II TIME TAD IPRED CWRES CPRED IWRES
            EVID A1 A2 ONEHEADER NOPRINT FILE=sdtab001 ; Simple table
$TABLE      ID SEX MED1 MED2 ONEHEADER NOPRINT NOAPPEND
            FORMAT=,1PE11.4 FILE=catab001.csv ; Table in csv format
$TABLE      ID CLCR AGE WT ONEHEADER FIRSTONLY NOPRINT NOAPPEND
            FILE=cotab001 ; Table with firstonly option
$TABLE      ID KA CL V ALAG1 ETAS(1:LAST) FIRSTONLY ONEHEADER NOPRINT
            NOAPPEND FILE=patab001 ; Table with firstonly option

; Problem no. 2

$PROBLEM    Model simulations
$INPUT      ID OCC XAT2=DROP DGRP=DROP DOSE FLAG=DROP ONO=DROP
            XIME=DROP DV NEUY=DROP SCR AGE SEX CLASS WT DROP ACE MED1
            MED2 NUMB=DROP TAD TIME VIDD=DROP CLCR AMT SS II DROP
            CMT=DROP CONO=DROP LNDV=DROP EVID=DROP OVID=DROP DROP
            SHR2=DROP
$DATA      mx19_1.csv IGNORE=@ REWIND
$MSFI      msf001
$SIMULATION (221287) ONLYSIM NSUB=20 ; Small sim for illustration only
$TABLE      ID OCC DV IPRED DOSE AMT TIME TAD EVID SEX CLCR AGE WT
            ONEHEADER NOPRINT NOAPPEND FILE=simtab001 ; Simulation table

NM-TRAN MESSAGES
 WARNINGS AND ERRORS (IF ANY) FOR PROBLEM    1
 (WARNING  2) NM-TRAN INFERS THAT THE DATA ARE POPULATION.
 (DATA WARNING   5) RECORD         1, DATA ITEM   4, CONTENTS: 814
 THE DV DATA ITEM IS POSITIVE, BUT THE MDV DATA ITEM IS 1
 (DATA WARNING   5) RECORD         8, DATA ITEM   4, CONTENTS: 0.3731
 THE DV DATA ITEM IS POSITIVE, BUT THE MDV DATA ITEM IS 1
 * THE MAXIMUM NUMBER OF WARNINGS OF ONE OR MORE TYPES WAS REACHED.
 IT IS POSSIBLE THAT SOME WARNING MESSAGES WERE SUPPRESSED.
 WARNINGS AND ERRORS (IF ANY) FOR PROBLEM    2
 (WARNING  2) NM-TRAN INFERS THAT THE DATA ARE POPULATION.
 (WARNING  22) WITH $MSFI AND "SUBPROBS", "TRUE=FINAL" IS ALSO REQUIRED ON
 $SIMUL RECORD. NM-TRAN HAS SUPPLIED THIS OPTION.
 * THE MAXIMUM NUMBER OF WARNINGS OF ONE OR MORE TYPES WAS REACHED.
 IT IS POSSIBLE THAT SOME WARNING MESSAGES WERE SUPPRESSED.
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
1NONLINEAR MIXED EFFECTS MODEL PROGRAM (NONMEM) VERSION 7.3.0
 ORIGINALLY DEVELOPED BY STUART BEAL, LEWIS SHEINER, AND ALISON BOECKMANN
 CURRENT DEVELOPERS ARE ROBERT BAUER, ICON DEVELOPMENT SOLUTIONS,
 AND ALISON BOECKMANN. IMPLEMENTATION, EFFICIENCY, AND STANDARDIZATION
 PERFORMED BY NOUS INFOSYSTEMS.
 PROBLEM NO.:         1
 Parameter estimation
 TOT. NO. OF OBS RECS:     1022
 TOT. NO. OF INDIVIDUALS:     74
 ONE COMPARTMENT MODEL WITH FIRST-ORDER ABSORPTION (ADVAN2)
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 #TBLN:      1
 #METH: First Order Conditional Estimation with Interaction
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
 #TERM:
0MINIMIZATION SUCCESSFUL
 NO. OF FUNCTION EVALUATIONS USED:      250
 NO. OF SIG. DIGITS IN FINAL EST.:  3.6

 ETABAR IS THE ARITHMETIC MEAN OF THE ETA-ESTIMATES,
 AND THE P-VALUE IS GIVEN FOR THE NULL HYPOTHESIS THAT THE TRUE MEAN IS 0.

 ETABAR:        -2.0109E-03 -2.7260E-02 -1.5201E-01
 SE:             1.8328E-02  2.4646E-02  1.2705E-01
 N:                      74          74          74

 P VAL.:         9.1264E-01  2.6869E-01  2.3152E-01

 ETAshrink(%):   2.1969E+01  2.0852E+01  2.0526E+01
 EBVshrink(%):   2.2048E+01  2.0414E+01  1.7852E+01
 EPSshrink(%):   6.9935E+00

 #TERE:
 Elapsed estimation time in seconds:     4.26
 Elapsed covariance time in seconds:     4.38

 ********************               FIRST ORDER CONDITIONAL ESTIMATION WITH INTERACTION              ********************
 #OBJT:**************                       MINIMUM VALUE OF OBJECTIVE FUNCTION                      ********************
 #OBJV:********************************************    -1518.108       **************************************************

 ********************               FIRST ORDER CONDITIONAL ESTIMATION WITH INTERACTION              ********************
 ********************                             FINAL PARAMETER ESTIMATE                           ********************

 THETA - VECTOR OF FIXED EFFECTS PARAMETERS   *********
         TH 1      TH 2      TH 3      TH 4      TH 5      TH 6
         2.56E+01  1.39E+00  4.74E+00  4.07E-01  2.46E-01  8.57E-03

 OMEGA - COV MATRIX FOR RANDOM EFFECTS - ETAS  ********
            ETA1      ETA2      ETA3
 ETA1
+        4.14E-02
 ETA2
+        0.00E+00  7.27E-02
 ETA3
+        0.00E+00  0.00E+00  1.92E+00

 SIGMA - COV MATRIX FOR RANDOM EFFECTS - EPSILONS  ****
            EPS1
 EPS1
+        1.00E+00

 OMEGA - CORR MATRIX FOR RANDOM EFFECTS - ETAS  *******
            ETA1      ETA2      ETA3
 ETA1
+        2.03E-01
 ETA2
+        0.00E+00  2.70E-01
 ETA3
+        0.00E+00  0.00E+00  1.38E+00

 SIGMA - CORR MATRIX FOR RANDOM EFFECTS - EPSILONS  ***
            EPS1
 EPS1
+        1.00E+00

 ********************               FIRST ORDER CONDITIONAL ESTIMATION WITH INTERACTION              ********************
 ********************                            STANDARD ERROR OF ESTIMATE                          ********************

 THETA - VECTOR OF FIXED EFFECTS PARAMETERS   *********
         TH 1      TH 2      TH 3      TH 4      TH 5      TH 6
         7.65E-01  6.03E-02  8.13E-01  7.66E-03  1.81E-02  1.42E-03

 OMEGA - COV MATRIX FOR RANDOM EFFECTS - ETAS  ********
            ETA1      ETA2      ETA3
 ETA1
+        1.13E-02
 ETA2
+       .........  1.71E-02
 ETA3
+       ......... .........  4.44E-01

 SIGMA - COV MATRIX FOR RANDOM EFFECTS - EPSILONS  ****
            EPS1
 EPS1
+       .........

 OMEGA - CORR MATRIX FOR RANDOM EFFECTS - ETAS  *******
            ETA1      ETA2      ETA3
 ETA1
+        2.77E-02
 ETA2
+       .........  3.17E-02
 ETA3
+       ......... .........  1.60E-01

 SIGMA - CORR MATRIX FOR RANDOM EFFECTS - EPSILONS  ***
            EPS1
 EPS1
+       .........

 ********************               FIRST ORDER CONDITIONAL ESTIMATION WITH INTERACTION              ********************
 ********************                          COVARIANCE MATRIX OF ESTIMATE                         ********************

            TH 1      TH 2      TH 3      TH 4      TH 5      TH 6      OM11      OM12      OM13      OM22      OM23      OM33
             SG11
 TH 1
+        5.86E-01
 TH 2
+        2.86E-03  3.63E-03
 TH 3
+       -9.94E-02  4.61E-03  6.62E-01
 TH 4
+       -7.59E-05 -1.06E-04 -3.67E-05  5.87E-05
 TH 5
+       -4.25E-03  5.15E-04  1.84E-03 -1.34E-05  3.27E-04
 TH 6
+        6.97E-05  4.02E-06 -3.30E-04  5.47E-08  4.05E-06  2.01E-06
 OM11
+        3.41E-04 -7.61E-05 -1.51E-04 -6.07E-06 -3.38E-05 -2.65E-07  1.27E-04
 OM12
+       ......... ......... ......... ......... ......... ......... ......... .........
 OM13
+       ......... ......... ......... ......... ......... ......... ......... ......... .........
 OM22
+       -2.41E-03  3.53E-04  1.06E-03 -2.43E-05  1.58E-04  1.25E-07 -1.62E-05 ......... .........  2.92E-04
 OM23
+       ......... ......... ......... ......... ......... ......... ......... ......... ......... ......... .........
 OM33
+       -2.56E-02 -5.06E-03  1.81E-01  3.95E-04 -8.39E-04 -1.36E-04  3.62E-05 ......... ......... -7.44E-04 .........  1.97E-01
 SG11
+       ......... ......... ......... ......... ......... ......... ......... ......... ......... ......... ......... .........
         .........

 ********************               FIRST ORDER CONDITIONAL ESTIMATION WITH INTERACTION              ********************
 ********************                          CORRELATION MATRIX OF ESTIMATE                        ********************

            TH 1      TH 2      TH 3      TH 4      TH 5      TH 6      OM11      OM12      OM13      OM22      OM23      OM33
             SG11
 TH 1
+        7.65E-01
 TH 2
+        6.19E-02  6.03E-02
 TH 3
+       -1.60E-01  9.41E-02  8.13E-01
 TH 4
+       -1.29E-02 -2.31E-01 -5.89E-03  7.66E-03
 TH 5
+       -3.07E-01  4.72E-01  1.25E-01 -9.70E-02  1.81E-02
 TH 6
+        6.43E-02  4.70E-02 -2.86E-01  5.04E-03  1.58E-01  1.42E-03
 OM11
+        3.95E-02 -1.12E-01 -1.64E-02 -7.02E-02 -1.65E-01 -1.65E-02  1.13E-02
 OM12
+       ......... ......... ......... ......... ......... ......... ......... .........
 OM13
+       ......... ......... ......... ......... ......... ......... ......... ......... .........
 OM22
+       -1.85E-01  3.43E-01  7.63E-02 -1.86E-01  5.12E-01  5.15E-03 -8.42E-02 ......... .........  1.71E-02
 OM23
+       ......... ......... ......... ......... ......... ......... ......... ......... ......... ......... .........
 OM33
+       -7.54E-02 -1.89E-01  5.00E-01  1.16E-01 -1.04E-01 -2.16E-01  7.22E-03 ......... ......... -9.80E-02 .........  4.44E-01
 SG11
+       ......... ......... ......... ......... ......... ......... ......... ......... ......... ......... ......... .........
         .........
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
 ********************               FIRST ORDER CONDITIONAL ESTIMATION WITH INTERACTION              ********************
 ********************                      EIGENVALUES OF COR MATRIX OF ESTIMATE                     ********************

             1         2         3         4         5         6         7         8         9
         3.52E-01  4.13E-01  6.06E-01  7.62E-01  8.50E-01  1.00E+00  1.14E+00  1.74E+00  2.13E+00

 PROBLEM NO.:         2
 Model simulations
 TOT. NO. OF OBS RECS:     1022
 TOT. NO. OF INDIVIDUALS:     74
 PROBLEM NO.:         2     SUBPROBLEM NO.:      1
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 SIMULATION STEP PERFORMED
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 #CPUT: Total CPU Time in Seconds,       10.379
